n := 360  # radiuses  # Helixes step
t1 := π/4 = 0.785398
t := 0, π/n .. 2*π
R1 := 94.7219
h := 57.1558
R2 := 20
# Parametric equations for a Circle
# 3D Point | 3D Vector
x1_cir(t) := -R1*sin(t)
x_cir(t) := R1*cos(t)
y1_cir(t) := R1*cos(t)
y_cir(t) := R1*sin(t)
z1_cir(t) := 0
z_cir(t) := 0
# [component: inputs (x_cir, y_cir, z_cir)]
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# Parametric equations for a Ellipse
# 3D Point | 3D Vector
x1_ell(t) := -R1*sin(t)
x_ell(t) := R1*cos(t)
y1_ell(t) := R2*cos(t)
y_ell(t) := R2*sin(t)
z1_ell(t) := 0
z_ell(t) := 0
# [component: inputs (x_ell, y_ell, z_ell)]
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# Parametric equations for a Helixes
# 3D Point
b := h/(2*π)  # 3D Vector
x_hel(t) := R1*cos(t)
x1_hel(t) := -R1*sin(t)
y_hel(t) := R1*sin(t)
y1_hel(t) := R1*cos(t)
z_hel(t) := t*b
z1_hel(t) := b
# [component: inputs (x_hel, y_hel, z_hel)]
# Checking data with the program
# Circle
# Point
# Vector
d/dt1(x_cir(t1)) = -66.9785
x_cir_t1 := R1*cos(t1) = 66.9785
x1_cir_t1 := -R1*sin(t1) = -66.9785
y_cir_t1 := R1*sin(t1) = 66.9785
y1_cir_t1 := R1*cos(t1) = 66.9785
d/dt1(y_cir(t1)) = 66.9785
# Ellipse
# Point
# Vector
d/dt1(x_ell(t1)) = -66.9785
x_ell_t1 := R1*cos(t1) = 66.9785
x1_ell_t1 := -R1*sin(t1) = -66.9785
y_ell_t1 := R2*sin(t1) = 14.1421
y1_ell_t1 := R2*cos(t1) = 14.1421
d/dt1(y_ell(t1)) = 14.1421
# Helixes
# 3DPoint
# 3DVector
d/dt1(x_hel(t1)) = -66.9785
x_hel_t1 := R1*cos(t1) = 66.9785
x1_hel_t1 := -R1*sin(t1) = -66.9785
y_hel_t1 := R1*sin(t1) = 66.9785
y1_hel_t1 := R1*cos(t1) = 66.9785
d/dt1(y_hel(t1)) = 66.9785
z_hel_t1 := t1*b = 7.14448
z1_hel_t1 := b = 9.09663
d/dt1(z_hel(t1)) = 9.09663
